// SBML level 3 version 1

model main()

  // Compartments:
  compartment cell = 1;

  // Species:
  substanceOnly species out0 in cell = 0;
  substanceOnly species conn0 in cell = 0;

  // Reactions:
  out_expression: => out0; basal + max/(1 + (conn0/K_d)^n);  // modifiers: conn0
    max = 928.567; basal = 0.969; K_d = 57.191; n = 1.337;
  out_degradation: out0 => ; out_degradation_k_loss*out0;
    out_degradation_k_loss = 0.004433836;
  out_expression1: => conn0; k_express;
    k_express = 12.880496;
  conn_degradation: conn0 => ; conn_degradation_k_loss*conn0;
    conn_degradation_k_loss = 0.004433836;
end
