// SBML level 3 version 1

model main()

  // Compartments:
  compartment cell = 1;

  // Species:
  substanceOnly species conn0 in cell = 0;
  substanceOnly species conn1 in cell = 0;
  substanceOnly species ind_conn0 in cell = 0;
  substanceOnly species conn2 in cell = 0;
  substanceOnly species out0 in cell = 0;
  substanceOnly species ind_conn2 in cell = 0;

  // Reactions:
  out_expression: => conn0; k_express;
    k_express = 244.383905;
  conn_degradation: conn0 => ; conn_degradation_k_loss*conn0;
    conn_degradation_k_loss = 0.0171794;
  out_expression1: => conn1; out_expression1_basal + out_expression1_max*(conn0 - conn0*ind_conn0^out_expression1_n_SM/(out_expression1_K_d_SM^out_expression1_n_SM + ind_conn0^out_expression1_n_SM))^out_expression1_n/(out_expression1_K_d^out_expression1_n + (conn0 - conn0*ind_conn0^out_expression1_n_SM/(out_expression1_K_d_SM^out_expression1_n_SM + ind_conn0^out_expression1_n_SM))^out_expression1_n) + out_expression1_max_TF*(conn0*ind_conn0^out_expression1_n_SM/(out_expression1_K_d_SM^out_expression1_n_SM + ind_conn0^out_expression1_n_SM))^out_expression1_n_TF/(out_expression1_K_d_TF^out_expression1_n_TF + (conn0*ind_conn0^out_expression1_n_SM/(out_expression1_K_d_SM^out_expression1_n_SM + ind_conn0^out_expression1_n_SM))^out_expression1_n_TF);  // modifiers: conn0, ind_conn0
    out_expression1_basal = 2.52734707; out_expression1_max = 1.55789934; out_expression1_K_d = 862.809479; out_expression1_n = 0.940226509; out_expression1_max_TF = 209.984146; out_expression1_K_d_TF = 7.92387903e-5; out_expression1_n_TF = 0.420848569; out_expression1_K_d_SM = 3.70260028e5; out_expression1_n_SM = 2.66658835;
  conn_degradation1: conn1 => ; conn_degradation1_k_loss*conn1;
    conn_degradation1_k_loss = 0.0171794;
  out_expression2: => conn2; out_expression2_basal + out_expression2_max/(1 + (conn1/out_expression2_K_d)^out_expression2_n);  // modifiers: conn1
    out_expression2_max = 928.567; out_expression2_basal = 0.969; out_expression2_K_d = 57.191; out_expression2_n = 1.337;
  conn_degradation2: conn2 => ; conn_degradation2_k_loss*conn2;
    conn_degradation2_k_loss = 0.0171794;
  out_expression3: => out0; out_expression3_basal + out_expression3_max*(conn2 - conn2*ind_conn2^out_expression3_n_SM/(out_expression3_K_d_SM^out_expression3_n_SM + ind_conn2^out_expression3_n_SM))^out_expression3_n/(out_expression3_K_d^out_expression3_n + (conn2 - conn2*ind_conn2^out_expression3_n_SM/(out_expression3_K_d_SM^out_expression3_n_SM + ind_conn2^out_expression3_n_SM))^out_expression3_n) + out_expression3_max_TF*(conn2*ind_conn2^out_expression3_n_SM/(out_expression3_K_d_SM^out_expression3_n_SM + ind_conn2^out_expression3_n_SM))^out_expression3_n_TF/(out_expression3_K_d_TF^out_expression3_n_TF + (conn2*ind_conn2^out_expression3_n_SM/(out_expression3_K_d_SM^out_expression3_n_SM + ind_conn2^out_expression3_n_SM))^out_expression3_n_TF);  // modifiers: conn2, ind_conn2
    out_expression3_basal = 0.880809684; out_expression3_max = 15.6531967; out_expression3_K_d = 1.01993374e4; out_expression3_n = 1.71885728; out_expression3_max_TF = 895.850096; out_expression3_K_d_TF = 92.8182299; out_expression3_n_TF = 0.776443122; out_expression3_K_d_SM = 75.9762782; out_expression3_n_SM = 1.83137522;
  out_degradation: out0 => ; out_degradation_k_loss*out0;
    out_degradation_k_loss = 0.0171794;

  // Events:
  event0: at (600) after (true), t0=false: ind_conn0 = 10000;
  event1: at (600) after (true), t0=false: ind_conn2 = 0.001;
end
