// SBML level 3 version 1

model main()

  // Compartments:
  compartment cell = 1;

  // Species:
  substanceOnly species conn0 in cell = 0;
  substanceOnly species ind_conn0 in cell = 0;
  substanceOnly species out0 in cell = 0;

  // Reactions:
  out_expression: => conn0; basal + max*(conn0 - conn0*ind_conn0^n_SM/(K_d_SM^n_SM + ind_conn0^n_SM))^n/(K_d^n + (conn0 - conn0*ind_conn0^n_SM/(K_d_SM^n_SM + ind_conn0^n_SM))^n) + max_TF*(conn0*ind_conn0^n_SM/(K_d_SM^n_SM + ind_conn0^n_SM))^n_TF/(K_d_TF^n_TF + (conn0*ind_conn0^n_SM/(K_d_SM^n_SM + ind_conn0^n_SM))^n_TF);  // modifiers: ind_conn0
    basal = 0.424896427; max = 0.791365713; K_d = 9687.28118; n = 0.790786849; max_TF = 120.367964; K_d_TF = 104.428299; n_TF = 0.733802666; K_d_SM = 127.060929; n_SM = 1.7089669;
  conn_degradation: conn0 => ; conn_degradation_k_loss*conn0;
    conn_degradation_k_loss = 0.004433836;
  out_expression1: => out0; k_express;
    k_express = 12.880496;
  out_degradation: out0 => ; out_degradation_k_loss*out0;
    out_degradation_k_loss = 0.004433836;

  // Events:
  event0: at (600) after (true), t0=false: ind_conn0 = 0;
end
