// SBML level 3 version 1

model main()

  // Compartments:
  compartment cell = 1;

  // Species:
  substanceOnly species conn0 in cell = 0;
  substanceOnly species out0 in cell = 0;

  // Reactions:
  out_expression: => conn0; basal + max*conn0^n/(K_d + conn0^n);
    max = 4.2925674; basal = 0.227268349; K_d = 909.8289; n = 6.7597246;
  conn_degradation: conn0 => ; conn_degradation_k_loss*conn0;
    conn_degradation_k_loss = 0.008;
  out_expression1: => out0; k_express;
    k_express = 2.55183;
  out_degradation: out0 => ; out_degradation_k_loss*out0;
    out_degradation_k_loss = 0.008;
end
