// SBML level 3 version 1

model main()

  // Compartments:
  compartment cell = 1;

  // Species:
  substanceOnly species out in cell = 0;
  substanceOnly species conn in cell = 0;
  substanceOnly species ind in cell = 0;

  // Reactions:
  out_expression: => out; basal + max*conn^n/(K_d^n + conn^n) + max_TF*conn^n_TF/(K_d_TF^n_TF + conn^n_TF)*(max_SM*ind^n_SM/(K_d_SM^n_SM + ind^n_SM));  // modifiers: conn, ind
    basal = 0.388427809; max = 1.2142962; K_d = 2.59164967e4; n = 0.778290957; max_TF = 17.5756798; K_d_TF = 1731.33072; n_TF = 0.680636018; max_SM = 17.584007; K_d_SM = 48.9512867; n_SM = 0.939678198;
end
