// SBML level 3 version 1

model main()

  // Compartments:
  compartment cell = 1;

  // Species:
  substanceOnly species out in cell = 0;
  substanceOnly species conn in cell = 0;
  substanceOnly species ind in cell = 0;

  // Reactions:
  out_expression: => out; basal + max*((conn - conn*(ind^n_SM/(K_d_SM^n_SM + ind^n_SM)))^n/(K_d^n + (conn - conn*(ind^n_SM/(K_d_SM^n_SM + ind^n_SM)))^n)) + max_TF*((conn*(ind^n_SM/(K_d_SM^n_SM + ind^n_SM)))^n_TF/(K_d_TF^n_TF + (conn*(ind^n_SM/(K_d_SM^n_SM + ind^n_SM)))^n_TF));  // modifiers: conn, ind
    basal = 2.52734707; max = 1.55789934; K_d = 862.809479; n = 0.940226509; max_TF = 3.70260028e5; K_d_TF = 2.66658835; n_TF = 209.984146; K_d_SM = 7.92387903e-5; n_SM = 0.420848569;
end
